# Интерполяция кусочно-линейным методом:
res_line := READPRN("C:\Users\Daniil\source\repos\Laba3.Metody\Laba3.Metody/Line.txt")
# Интерполяция кусочно-квадратичным методом:
square := READPRN("C:\Users\Daniil\source\repos\Laba3.Metody\Laba3.Metody/Square.txt")
# Интерполяция методом Ньютона:
Newton := READPRN("C:\Users\Daniil\source\repos\Laba3.Metody\Laba3.Metody/Newton.txt")
# Интерполяция методом Лагранжа:
Lagrange := READPRN("C:\Users\Daniil\source\repos\Laba3.Metody\Laba3.Metody/Lagrange.txt")
dim := rows(res_line)
i := 0 .. dim - 1
# Исходная функция:
f(x) := sin(x)/x
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# Среднеквадратическое отклонение:
SKW := READPRN("C:\Users\Daniil\source\repos\Laba3.Metody\Laba3.Metody/skv.txt")
# Интерполяция кусочно-линейным методом:
SKW[0] = 0.011557
# Интерполяция кусочно-квадратичным методом:
SKW[1] = 0.00445765
# Интерполяция методом Ньютона:
SKW[2] = 0.000190818
# Интерполяция методом Лагранжа:
SKW[3] = 0.000190818
