res_line := READPRN("C:\Users\Daniil\source\repos\Laba3.Metody\Laba3.Metody/NewLine.txt")
res_sq := READPRN("C:\Users\Daniil\source\repos\Laba3.Metody\Laba3.Metody/NewSquare.txt")
dim := rows(res_line)
i := 0 .. dim - 1
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