# Нужно задать: имя файла и шаг по выборке в реальных координатах
Sample := READPRN("C:\Users\Daniil\source\repos\workwFFT\workwFFT\sample.txt")
step := 0.0625
SpectrRe := READPRN("C:\Users\Daniil\source\repos\workwFFT\workwFFT\spektreal.txt")
SpectrIm := READPRN("C:\Users\Daniil\source\repos\workwFFT\workwFFT\spektrimg.txt")
# ------- вычисления ---------------------------------------------------------------------------------------------------------------------------------------------------------------------
dim := rows(Sample)
dim2 := dim/2
i := 0 .. dim - 1
xy(i) := (i - dim2)*step
# ------- результат--------------------------------------------------------------------------------------------------------------------------------------------------------------------------
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