# Нужно задать: имя файла и шаг по выборке в реальных координатах
step := 0.0625
Sample := READPRN("C:\Users\Daniil\source\repos\workwFFT\workwFFT\ftwo.txt")
Sample_ref := READPRN("C:\Users\Daniil\source\repos\workwFFT\workwFFT\ftwoid.txt")
Spectr := READPRN("C:\Users\Daniil\source\repos\workwFFT\workwFFT\fur2d.txt")
Spectr_ref := READPRN("C:\Users\Daniil\source\repos\workwFFT\workwFFT\fur2did.txt")
# ------- вычисления -------------------------------------------------------------------------------------------------------------------------------------------------------------------------------------------------------------------
dim := cols(Spectr)
dim2 := dim/2
i := 0 .. dim - 1
xy(i) := (i - dim2)*step
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# ------- результат-------------------------------------------------------------------------------------------------------------------------------------------------------------------------------------------------------------------------
# [component: inputs Sample_ref]
# [component: inputs Sample]
# [component: inputs Spectr_ref]
# [component: inputs Spectr]
